*Heading
** Job name: Job-dispersao Model name: Model-1
** Generated by: Abaqus/CAE 6.14-1
*Preprint, echo=NO, model=NO, history=NO, contact=NO
**
** PARTS
**
*Part, name=Part-1
*Node
      1,   3.22316408,   1.59863997
      2,   3.22316408,  0.856970012
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*Element, type=DCC2D4
 1,  1,  2, 31, 78
 2, 78, 31, 32, 77
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*Element, type=DC2D3
296,   45,  275,  276
297,  494,  260,    2
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*Nset, nset=CPU
  15,  16,  24,  25,  26, 189, 190, 191, 192, 193, 194, 195, 490, 491, 492, 493
*Elset, elset=CPU, generate
 287,  295,    1
*Nset, nset=RAM
  20,  21,  22,  23, 175, 176
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*Elset, elset=RAM, generate
 273,  286,    1
*Nset, nset=DVD
   4,   5,  17,  18,  19,  79
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*Elset, elset=DVD, generate
  78,  272,    1
*Nset, nset=DISSIPADOR
  10,  11,  12,  13,  14,  15
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*Elset, elset=DISSIPADOR, generate
 56,  77,   1
*Nset, nset=_PickedSet19, internal
   6,   7,   8,   9,  90,  91
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*Elset, elset=_PickedSet19, internal, generate
 32,  55,   1
*Nset, nset=VENTOINHA
  1,  2,  3,  4,  5, 31
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*Elset, elset=VENTOINHA, generate
  1,  31,   1
*Nset, nset=_PickedSet24, internal
  1,  2,  3,  4,  5, 31
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*Elset, elset=_PickedSet24, internal, generate
  1,  31,   1
*Nset, nset=PCB
    1,    2,    3,    4,    5,    6
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*Elset, elset=PCB, generate
  296,  1035,     1
** Section: CPU
*Solid Section, elset=_PickedSet24, material=HeatSlug(Processador)
,
** Section: DVD
*Solid Section, elset=_PickedSet19, material=DVD
,
** Section: COBRE
*Solid Section, elset=DISSIPADOR, material=Cobre
,
** Section: DVD
*Solid Section, elset=DVD, material=DVD
,
** Section: CPU
*Solid Section, elset=RAM, material=HeatSlug(Processador)
,
** Section: CPU
*Solid Section, elset=CPU, material=HeatSlug(Processador)
,
** Section: PCB
*Solid Section, elset=PCB, material=PCB
,
*End Part
**
**
** ASSEMBLY
**
*Assembly, name=Assembly
**
*Instance, name=Part-1-1, part=Part-1
*End Instance
**
*Nset, nset=Set-5, instance=Part-1-1
   4,   5,  10,  11,  12,  13
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*Elset, elset=Set-5, instance=Part-1-1, generate
  56,  272,    1
*Nset, nset=Set-6, instance=Part-1-1
  11,  12,  17,  18,  27,  28
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*Elset, elset=Set-6, instance=Part-1-1
  57,  59,  61,  63,  65,  67
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*Nset, nset=_PickedSet8, internal, instance=Part-1-1
  15,  16,  24,  25,  26, 189, 190, 191, 192, 193, 194, 195, 490, 491, 492, 493
*Elset, elset=_PickedSet8, internal, instance=Part-1-1, generate
 287,  295,    1
*Nset, nset=_PickedSet9, internal, instance=Part-1-1
  20,  21,  22,  23, 175, 176
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*Elset, elset=_PickedSet9, internal, instance=Part-1-1, generate
 273,  286,    1
*Nset, nset=_PickedSet16, internal, instance=Part-1-1
  1,  2,  3,  4,  5, 31
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*Elset, elset=_PickedSet16, internal, instance=Part-1-1, generate
  1,  31,   1
*Nset, nset=_PickedSet17, internal, instance=Part-1-1
    1,    2,    3,    4,    5,    6
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*Elset, elset=_PickedSet17, internal, instance=Part-1-1, generate
  296,  1035,     1
*Nset, nset=_PickedSet18, internal, instance=Part-1-1
   1,   2,   3,   4,   5,   6
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*Elset, elset=_PickedSet18, internal, instance=Part-1-1, generate
   1,  295,    1
*End Assembly
**
** MATERIALS
**
*Material, name=Cobre
*Conductivity
398.,
*Density
1.,
*Specific Heat
 5e-05,
*Material, name=DVD
*Conductivity
 0.05,
*Density
1.,
*Specific Heat
3500.,
*Material, name=HeatSlug(Processador)
*Conductivity
130.,
*Density
1.,
*Specific Heat
712.,
*Material, name=PCB
*Conductivity
 0.63,
*Density
1.,
*Specific Heat
1750.,
**
** PREDEFINED FIELDS
**
** Name: Predefined Field-1   Type: Temperature
*Initial Conditions, type=TEMPERATURE
_PickedSet17, 303.
** Name: Predefined Field-2   Type: Temperature
*Initial Conditions, type=TEMPERATURE
_PickedSet18, 303.
** ----------------------------------------------------------------
**
** STEP: Step-1
**
*Step, name=Step-1, nlgeom=NO, inc=50000
*Heat Transfer, end=PERIOD
10., 30000., , ,
**
** BOUNDARY CONDITIONS
**
** Name: BC-2 Type: Temperature
*Boundary
_PickedSet8, 11, 11, 353.6
** Name: BC-3 Type: Temperature
*Boundary
_PickedSet9, 11, 11, 343.
** Name: BC-4 Type: Temperature
*Boundary
_PickedSet16, 11, 11, 330.
**
** OUTPUT REQUESTS
**
*Restart, write, frequency=0
**
** FIELD OUTPUT: F-Output-1
**
*Output, field, variable=PRESELECT
*Output, history, frequency=0
*End Step
