*Heading
** Job name: ventoinha Model name: Model-2
** Generated by: Abaqus/CAE 6.14-1
*Preprint, echo=NO, model=NO, history=NO, contact=NO
**
** PARTS
**
*Part, name=Part-1
*Node
      1,   14.8900003,   18.8600006,           0.
      2,   14.8900003,   21.1000004,           0.
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*Element, type=FC3D4
   1,  744, 2199, 2200,  742
   2,  868,  967,  867, 2199
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*Nset, nset=_PickedSet2, internal, generate
    1,  2420,     1
*Elset, elset=_PickedSet2, internal, generate
    1,  7574,     1
** Section: Section-1
*Fluid Section, type=SINGLE FLUID, elset=_PickedSet2
ar,
*End Part
**
**
** ASSEMBLY
**
*Assembly, name=Assembly
**
*Instance, name=Part-1-1, part=Part-1
*End Instance
**
*Elset, elset=__PickedSurf4_S1, internal, instance=Part-1-1
  228, 1262, 1570, 1581, 3305, 3763
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*Elset, elset=__PickedSurf4_S2, internal, instance=Part-1-1
  378,  495,  520,  656,  809,  854
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*Elset, elset=__PickedSurf4_S3, internal, instance=Part-1-1
  387,  572,  883,  908,  999, 1029
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*Elset, elset=__PickedSurf4_S4, internal, instance=Part-1-1
  551,  725,  880,  980, 1573, 3327, 4301, 4475, 4895, 4962, 5112, 6377, 6617, 6995
*Surface, type=ELEMENT, name=_PickedSurf4, internal
__PickedSurf4_S1, S1
__PickedSurf4_S2, S2
__PickedSurf4_S4, S4
__PickedSurf4_S3, S3
*Elset, elset=__PickedSurf5_S3, internal, instance=Part-1-1
    4,    9,   16,   20,   22,   23
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*Elset, elset=__PickedSurf5_S2, internal, instance=Part-1-1
    7,   11,   45,   79,  135,  304
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*Elset, elset=__PickedSurf5_S4, internal, instance=Part-1-1
   29,   62,  107,  121,  126,  132
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*Elset, elset=__PickedSurf5_S1, internal, instance=Part-1-1
    2,   42,  121,  151,  180,  275
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*Surface, type=ELEMENT, name=_PickedSurf5, internal
__PickedSurf5_S3, S3
__PickedSurf5_S2, S2
__PickedSurf5_S4, S4
__PickedSurf5_S1, S1
*Elset, elset=__PickedSurf6_S2, internal, instance=Part-1-1
  823,  987, 1327, 2078, 2227, 2228
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*Elset, elset=__PickedSurf6_S3, internal, instance=Part-1-1
   22,   23,   30,   38,   63,   80
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*Elset, elset=__PickedSurf6_S1, internal, instance=Part-1-1
    2,   42,  151,  275,  568,  597
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*Elset, elset=__PickedSurf6_S4, internal, instance=Part-1-1
   62,  107,  126,  268,  272,  343
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*Surface, type=ELEMENT, name=_PickedSurf6, internal
__PickedSurf6_S2, S2
__PickedSurf6_S3, S3
__PickedSurf6_S4, S4
__PickedSurf6_S1, S1
*End Assembly
**
** MATERIALS
**
*Material, name=ar
*Density
 9.98204e-07,
*Viscosity
 1.002e-09,
** ----------------------------------------------------------------
**
** STEP: Step-1
**
*Step, name=Step-1, nlgeom=NO
*CFD, incompressible navier stokes
0.01, 2., 0.025, 0.45, 1
1e-10, 0.5,  , 0.5, 0.5
*Momentum Equation Solver
50, 2, 1e-05
*Pressure Equation Solver
250, 2, 1e-05
ICC, 1, 1, CG
*Transport Equation Solver
50, 2, 1e-05
**
** BOUNDARY CONDITIONS
**
** Name: inflow Type: Fluid inlet/outlet
*Fluid Boundary, type=Surface
_PickedSurf4, VELZ, -1.
** Name: livre Type: Fluid inlet/outlet
*Fluid Boundary, type=Surface
_PickedSurf5, P, 0.
** Name: placa Type: Fluid inlet/outlet
*Fluid Boundary, type=Surface
_PickedSurf6, VELZ, 0.
**
** OUTPUT REQUESTS
**
*Restart, write, frequency=0
**
** FIELD OUTPUT: F-Output-1
**
*Output, field, variable=PRESELECT
*Output, history, frequency=0
*End Step
