*Heading
** Job name: ventoinha6 Model name: Model-2
** Generated by: Abaqus/CAE 6.14-1
*Preprint, echo=NO, model=NO, history=NO, contact=NO
**
** PARTS
**
*Part, name=Part-1
*Node
      1,         35.5,   18.2250004,           1.
      2,   22.8999996,   6.07499981,           1.
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*Element, type=FC3D8
   1,  281,   15,   14,  293, 1617, 1351, 1350, 1629
   2,  295,   17,   16,  294, 1631, 1353, 1352, 1630
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*Nset, nset=Set-1, generate
    1,  2672,     1
*Elset, elset=Set-1, generate
    1,  1273,     1
** Section: Section-1
*Fluid Section, type=SINGLE FLUID, elset=Set-1
ar,
*End Part
**
**
** ASSEMBLY
**
*Assembly, name=Assembly
**
*Instance, name=Part-1-1, part=Part-1
*End Instance
**
*Elset, elset=_Surf-1_S1, internal, instance=Part-1-1, generate
   1,  481,    1
*Surface, type=ELEMENT, name=Surf-1
_Surf-1_S1, S1
*Elset, elset=_Surf-2_S1, internal, instance=Part-1-1, generate
  482,  1273,     1
*Elset, elset=_Surf-2_S6, internal, instance=Part-1-1
 488, 489, 490, 491, 520, 528
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*Elset, elset=_Surf-2_S5, internal, instance=Part-1-1
  493,  515,  553,  631,  649,  674,  745,  821,  895,  898,  901, 1006
*Elset, elset=_Surf-2_S4, internal, instance=Part-1-1
 522, 524, 525, 526, 540, 544
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*Elset, elset=_Surf-2_S3, internal, instance=Part-1-1
 513, 514, 599, 638, 640, 642, 646, 650, 785, 902, 904
*Elset, elset=_Surf-2_S2, internal, instance=Part-1-1, generate
    1,  1273,     1
*Surface, type=ELEMENT, name=Surf-2
_Surf-2_S1, S1
_Surf-2_S6, S6
_Surf-2_S4, S4
_Surf-2_S2, S2
_Surf-2_S5, S5
_Surf-2_S3, S3
*Elset, elset=_Surf-3_S2, internal, instance=Part-1-1, generate
    1,  1273,     1
*Surface, type=ELEMENT, name=Surf-3
_Surf-3_S2, S2
*End Assembly
**
** MATERIALS
**
*Material, name=ar
*Density
 9.98204e-07,
*Viscosity
 1.002e-09,
** ----------------------------------------------------------------
**
** STEP: Step-1
**
*Step, name=Step-1, nlgeom=NO
*CFD, incompressible navier stokes
0.01, 1., 0.025, 0.45, 1
1e-10, 0.5,  , 0.5, 0.5
*Momentum Equation Solver
50, 2, 1e-05
*Pressure Equation Solver
250, 2, 1e-05
ICC, 1, 1, CG
*Transport Equation Solver
50, 2, 1e-05
**
** BOUNDARY CONDITIONS
**
** Name: inflow Type: Fluid inlet/outlet
*Fluid Boundary, type=Surface
Surf-1, VELZ, -1.
** Name: livre Type: Fluid inlet/outlet
*Fluid Boundary, type=Surface
Surf-2, P, 0.
** Name: placa Type: Fluid inlet/outlet
*Fluid Boundary, type=Surface
Surf-3, VELZ, 0.
**
** OUTPUT REQUESTS
**
*Restart, write, frequency=0
**
** FIELD OUTPUT: F-Output-1
**
*Output, field, variable=PRESELECT
*Output, history, frequency=0
*End Step
